# Especificações de Projeto
# Considerações de Projeto
n := 1
e_min := 3
e := 1
e_max := 4
Pn := 100  # [W]
Ve_min := 10  # [V]
fs := 50*10^3  # [Hz]
s := 2
max := 1
Ve := 14  # [V]
Ve_max := 16  # [V]
min := 2
Vs := 24  # [V]
Δi := 0.2
Δv := 0.25
Erro_tensao := Δv*Vs = 6
# Cálculos
# Corrente de carga nominal:
in := Pn/Vs = 4.16667  # [A]
R := Vs/in = 5.76  # [Ω]
# Razões cíclicas mínimas e máximas:
DC := 1 - Ve/Vs = 0.416667
Dmax := 1 - Ve_min/Vs = 0.583333
DC*5 = 2.08333
Dmin := 1 - Ve_max/Vs = 0.333333
Dmin*5 = 1.66667
Dmax*5 = 2.91667
# Valor mínimo da Induntância:
L := Ve*Dmax/(Δi*in*fs) = 0.000196
C := in*Dmax/(Δv*Vs*fs) = 8.10185e-6
L := 200*10^-6
C := 10*10^-6
# Modelagem do Conversor Boost:
RSE := 1*10^6 = 1000000  # Resistência em paralelo com capacitor
s := 2*π/10, 5*2*π/10 .. 10^6
Kd := Vs/(1 - Dmax)^2 = 138.24
fs/5 = 10000
ωz1 := 1/(C*RSE) = 0.1
s*1i
ωz2 := (1 - Dmax)^2*R/L = 5000
ωp := 1/sqrt(C*L)*(1 - Dmax) = 9316.95
Q := ωp*C*(R + RSE) = 93170
G(s) := Kd*(1 + s*1i/ωz1)*(1 - s*1i/ωz2)/(1 + s*1i/(ωp*Q) + (s*1i)^2/ωp^2)
Mod(s) := 20*log(|G(s)|)
θ(s) := arg(G(s))*180/π
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# FTMA:
Vref := 5
Vm := 5
Hs := Vref/Vs
Fm := 1/Vm
FTMA(s) := Fm*Hs*G(s)
Mod(s) := 20*log(|FTMA(s)|)
θ(s) := arg(FTMA(s))*180/π
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# Modelagem do Compensador:
ωzc1 := |-(ωp^2*(1/(2*Q*ωp) + sqrt(-(2*Q - 1)*(2*Q + 1))/(2*Q*ωp)))| = 9316.95
1 + s/(ωp*Q) + s^2/ωp^2 == 0
ωzc2 := |-(ωp^2*(1/(2*Q*ωp) - sqrt(-(2*Q - 1)*(2*Q + 1))/(2*Q*ωp)))| = 9316.95
[
    -ωp^2*(1/(2*Q*ωp) + sqrt(-(2*Q - 1)*(2*Q + 1))/(2*Q*ωp));
    -ωp^2*(1/(2*Q*ωp) - sqrt(-(2*Q - 1)*(2*Q + 1))/(2*Q*ωp))
]
ωzc1 := |-(ωp^2*(1/(2*Q*ωp) + sqrt(-(2*Q - 1)*(2*Q + 1))/(2*Q*ωp)))| = 9316.95
ωzc2 := -(ωp^2*(1/(2*Q*ωp) - sqrt(-(2*Q - 1)*(2*Q + 1))/(2*Q*ωp))) = -0.0499997 + 9316.95i
FTMAC(s) := FTMA(s)*1/(5*10^4)*(s*1i - ωzc1)*(s*1i - ωzc2)/(s*1i*((1 + s*1i/ωz1)*(1 - s*1i/ωz2)))
Mod(s) := 20*log(|FTMAC(s)|)
fc := 7.153*10^3
θ(s) := arg(FTMAC(s))*180/π
MF := 180 - 115 = 65
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C(s) := 1/10^4*1/(s*1i)*(s*1i + ω1)*(s*1i + ω2)  # error: This variable is undefined.
ω1*ω2 =  # error: This variable is undefined.
C(s) := 0.001*((s*1i)^2 + (ω1 + ω2)*s*1i + (ω1*ω2))/(s*1i)  # error: This variable is undefined.
ω1 + ω2 =  # error
