n := 1
e_min := 3
# Especificações de Projeto
# Considerações de Projeto
e := 1
e_max := 4
P[n] := 100  # [W]
s := 2
max := 1
f[s] := 50*10^3  # [Hz]
min := 2
V[e] := 14  # [V]
Δi := 0.2
V[s] := 24  # [V]
Δv := 0.25
# Cálculos
# Corrente de carga nominal:
i[n] := P[n]/V[s]
i[n] = 4.16667
R := V[s]/i[n]
R = 5.76
# Razões cíclicas mínimas e máximas:
V[e_min] := V[e] - V[e]*Δv/2
V[e_min] = 12.25
V[e_max] := V[e] + V[e]*Δv/2
V[e_max] = 15.75
D[max] := 1 - V[e_min]/V[s]
D[max] = 0.489583
D[min] := 1 - V[e_max]/V[s]
D[min] = 0.34375
# Valor mínimo da Induntância:
L := V[e]*D[max]/(Δi*f[s])
L = 0.000685417  # Temos então L = 690uH
C := i[n]*D[max]/(Δv*f[s])
C = 0.000163194  # Temos então C = 165uF
D := 1 - V[e]/V[s]
D = 0.416667
