# Especificações de Projeto | Considerações de Projeto
Pn := 20  # [W]
fs := 40*10^3  # [Hz]
Ve_min := 10  # [V]
Δi := 0.2
Ve_max := 14  # [V]
Δv := 0.1
Vs := 5  # [V]
Erro_tensao := Δv*Vs = 0.5
# Cálculos
# Corrente de carga nominal:
in := Pn/Vs = 4  # [A]
R := Vs/in = 1.25  # [Ω]
# Razões cíclicas mínimas e máximas:
DC := Vs/((Ve_max + Ve_min)/2) = 0.416667
Dmax := Vs/Ve_min = 0.5
DC*5 = 2.08333
Dmin := Vs/Ve_max = 0.357143
Dmin*5 = 1.78571
Dmax*5 = 2.5
# Valor mínimo da Induntância:
L := (Ve_min - Vs)*Dmax/(Δi*in*fs) = 7.8125e-5
C := in*(1 - Dmin)/(Δv*Vs*fs) = 0.000128571
Ve := (Ve_min + Ve_max)/2 = 12
L := 100*10^-6
C := 147*10^-6
# Modelagem do Conversor Buck:
s := 2*π/10, 5*2*π/10 .. 10^6
fs/4 = 10000
G(s) := Ve/(L*C*(s*1i)^2 + L/R*s*1i + 1)
L*C*s^2 + L/R*s + 1 == 0
ω1 := |-(L/(2*R) + sqrt(L*(L - 4*C*R^2))/(2*R))/(C*L)| = 8247.86
ω2 := |-(L/(2*R) + sqrt(L*(L - 4*C*R^2))/(2*R))/(C*L)| = 8247.86
Mod(s) := 20*log(|G(s)|)
θ(s) := arg(G(s))*180/π
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# FTMA:
Vref := 5
Vm := 5
Hs := Vref/Vs
Fm := 1/Vm
FTMA(s) := Fm*Hs*G(s)
Mod(s) := 20*log(|FTMA(s)|)
fc := 2.31*10^3
θ(s) := arg(FTMA(s))*180/π
MF := 180 - 151 = 29
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# Modelagem do Compensador:
FTMAC(s) := FTMA(s)*1/10^4*1/(s*1i)*(s*1i + ω1)*(s*1i + ω2)
Mod(s) := 20*log(|FTMAC(s)|)
fc := 3.37*10^3
θ(s) := arg(FTMAC(s))*180/π
MF := 180 - 115 = 65
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C(s) := 1/10^4*1/(s*1i)*(s*1i + ω1)*(s*1i + ω2)
ω1*ω2 = 68027211
C(s) := 0.001*((s*1i)^2 + (ω1 + ω2)*s*1i + (ω1*ω2))/(s*1i)
ω1 + ω2 = 16495.7
