n := 1
e_min := 3
# Especificações de Projeto
# Considerações de Projeto
e := 1
e_max := 4
P[n] := 100  # [W]
s := 2
max := 1
f[s] := 40*10^3  # [Hz]
min := 2
V[e_min] := 10  # [V]
Δi := 0.2
V[e_max] := 14  # [V]
Δv := 0.25
V[s] := 12  # [V]
# Cálculos
# Corrente de carga nominal:
i[n] := P[n]/V[s]
i[n] = 8.33333
R := V[s]/i[n]
R = 1.44
# Razões cíclicas mínimas e máximas:
D[max] := V[s]/(V[e_min] + V[s])
D[max] = 0.545455
D[min] := V[s]/(V[e_max] + V[s])
D[min] = 0.461538
# Valor mínimo da Induntância:
L := V[e_max]*D[max]/((Δi*i[n])*f[s])
L = 0.000114545
C := i[n]*D[max]/((Δv*V[s])*f[s])
C = 3.78788e-5
DC := V[s]/((V[e_max] + V[e_min])/2 + V[s])
DC = 0.5
V[e_min] := V[e] - V[e]*Δv/2
V[e_min] = 0
V[e_max] := V[e] + V[e]*Δv/2
V[e_max] = 0
