n := 1
e_min := 3
# Especificações de Projeto
# Considerações de Projeto
e := 1
e_max := 4
P[n] := 20  # [W]
s := 2
max := 1
f[s] := 25*10^8  # [Hz]
min := 2
V[e] := 14  # [V]
Δi := 0.3
V[s] := 5  # [V]
Δv := 0.2
# Cálculos
# Corrente de carga nominal:
i[n] := P[n]/V[s]
i[n] = 4
# Razões cíclicas mínimas e máximas:
V[e_min] := V[e] - V[e]*Δv/2
V[e_min] = 12.6
V[e_max] := V[e] + V[e]*Δv/2
V[e_max] = 15.4
D[max] := V[s]/V[e_min]
D[max] = 0.396825
D[min] := V[s]/V[e_max]
D[min] = 0.324675
# Valor mínimo da Induntância:
L := (V[e] - V[s])*D[max]/(Δi*f[s])
L = 4.7619e-9  # Temos então L = 4.8nH
C := i[n]*(1 - D[min])/(Δv*f[s])
C = 5.4026e-9  # Temos então C = 5.5nF
5/4 = 1.25
